// COMSOL Multiphysics 5.2.0.166 model "pm2.5.mph"
// 未命名
// Outline of the model tree

Parameters
  rad = 1000

Functions
  rect1: Rectangle "方波 1" | lower = 0; upper = 36000

Probes
  dom1: Domain "高压开关厂探针" (disabled) on domains 4 | expr = u; table = tbl1
  dom2: Domain "阎良区探针" (disabled) on domains 14 | expr = u; table = tbl2
  dom3: Domain "高新西区探针" (disabled) on domains 3 | expr = u; table = tbl5

Geometry
  geom1 "几何 1" (2D, length unit m)
    c1: Circle "市人民广场" | r = rad
    c2: Circle "高压开关厂" | pos = {-6100, 330}; r = rad
    c3: Circle "兴庆小区" | pos = {2800, -1200}; r = rad
    c4: Circle "纺织城" | pos = {9700, -425}; r = rad
    c5: Circle "小寨" | pos = {-700, -5200}; r = rad
    c6: Circle "高新西区" | pos = {-6200, -4300}; r = rad
    c7: Circle "经开区" | pos = {-1500, 8400}; r = rad
    c8: Circle "长安区" | pos = {-4400, -12400}; r = rad
    c9: Circle "阎良区" | pos = {25100, 43600}; r = rad
    c10: Circle "临潼关" | pos = {23800, 10800}; r = rad
    c11: Circle "曲江文化区" | pos = {2100, -6700}; r = rad
    c12: Circle "广运潭" | pos = {9100, 5000}; r = rad
    c13: Circle "草滩" | pos = {-8200, 11000}; r = rad
    r1: Rectangle "矩形 1" | base = center; size = {1000000, 1000000}
    fin: Finalize "形成联合体"

Materials
  mat1: Common "Air" on all domains
    def "基本"
      relpermeability = 1
      relpermittivity = 1
      dynamicviscosity = eta(T[1/K])[Pa*s]
      ratioofspecificheat = 1.4
      electricconductivity = 0[S/m]
      heatcapacity = Cp(T[1/K])[J/(kg*K)]
      density = rho(pA[1/Pa],T[1/K])[kg/m^3]
      thermalconductivity = k(T[1/K])[W/(m*K)]
      soundspeed = cs(T[1/K])[m/s]
      eta: Piecewise "分段" | arg = T; extrap = constant; pieces = {200.0, 1600.0, -8.38278E-7+8.35717342E-8*T^1-7.69429583E-11*T^2+4.6437266E-14*T^3-1.06585607E-17*T^4}
      Cp: Piecewise "分段 2" | arg = T; extrap = constant; pieces = {200.0, 1600.0, 1047.63657-0.372589265*T^1+9.45304214E-4*T^2-6.02409443E-7*T^3+1.2858961E-10*T^4}
      rho: Analytic "解析" | expr = pA*0.02897/8.314/T; args = {pA, T}; dermethod = manual; argders = {{pA, d(pA*0.02897/8.314/T,pA)}, {T, d(pA*0.02897/8.314/T,T)}}
      k: Piecewise "分段 3" | arg = T; extrap = constant; pieces = {200.0, 1600.0, -0.00227583562+1.15480022E-4*T^1-7.90252856E-8*T^2+4.11702505E-11*T^3-7.43864331E-15*T^4}
      cs: Analytic "解析 2" | expr = sqrt(1.4*287*T); args = T; dermethod = manual; argders = {T, d(sqrt(1.4*287*T),T)}
    RefractiveIndex "折射率"
      n = 1
      ki = 0

Physics
  cdeq: ConvectionDiffusionEquation "对流-扩散方程" on all domains
    dependent variable u
    cdeq1: ConvectionDiffusionEquation "对流-扩散方程 1" (default) | f = 0; c = {1000, 0, 0, 1000}; be = {5, 5}
    zflx1: ZeroFluxBoundary "零通量 1" (default)
    init1: init "初始值 1" (default) | u = 0
    init2: init "高压开关厂" on domains 4 | u = 0
    src1: SourceTerm "源项 1" on domains 4 | f = 10*rect1(1)
    dir1: DirichletBoundary "狄氏边界条件 1" on boundaries 1-4 | r = 0; useDirichletCondition = 1
    dir2: DirichletBoundary "狄氏边界条件 2" (disabled) on boundaries 11, 12, 15, 16 | r = 0

Mesh
  mesh1 "网格 1" (physics-controlled)
    size: MeshSizeDefault "尺寸" | hauto = 2

Studies
  std1 "研究 1"
    stat: Stationary "稳态"

Solver configurations
  sol1 "解 1" (study std1)
    v1: Variables "因变量 1"
    s1: Stationary "稳态求解器 1"
      dDef: Direct "直接"
      fc1: FullyCoupled "全耦合 1" | linsolver = dDef

Datasets
  dset1: Solution | solution = sol1
  dset2: Solution "探针解 2" | solution = sol1
  avh1: Average "高压开关厂探针" on domains 4 | data = dset2
  avh2: Average "阎良区探针" on domains 14 | data = dset2
  avh3: Average "高新西区探针" on domains 3 | data = dset2

Derived values
  pev1: EvalPoint "高压开关厂探针" | data = avh1; table = tbl1; expr = u
  pev2: EvalPoint "阎良区探针" | data = avh2; table = tbl2; expr = u
  pev3: EvalPoint "高新西区探针" | data = avh3; table = tbl5; expr = u

Tables
  tbl1: Table "探针表 1"
    因变量 u (1), 高压开关厂探针
    1.52868e+09
  tbl2: Table "探针表 2"
    因变量 u (1), 阎良区探针
    8.7015e+06
  tbl3: Table "探针表 3"
    因变量 u (1), 高新西区探针
    8.17357e+08
  tbl4: Table "探针表 4"
    因变量 u (1), 高新西区探针
    8.17357e+08
  tbl5: Table "探针表 5"
    因变量 u (1), 高新西区探针
    8.17357e+08

Plots
  pg1: PlotGroup2D "二维绘图组 1" | data = dset1
    surf1: Surface "表面 1" | expr = u